*Heading
** Job name: Job-1 Model name: Model-1
** Generated by: Abaqus/CAE 2020
*Preprint, echo=NO, model=NO, history=NO, contact=NO
**
** PARTS
**
*Part, name=Tube
*Node
      1, -0.00887135696, 0.00461508753,           0.
      2, -0.00443738233, 0.00230426551,           0.
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*Element, type=C3D8
    1,   165,   173,   255,   192,     1,     9,    91,    28
    2,   173,   174,   256,   255,     9,    10,    92,    91
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*Nset, nset=Tube, generate
     1,  26404,      1
*Elset, elset=Tube, generate
     1,  19680,      1
** Section: Section-1
*Solid Section, elset=Tube, material=Material-1
,
*End Part
**
**
** ASSEMBLY
**
*Assembly, name=Assembly
**
*Instance, name=Tube-1, part=Tube
*End Instance
**
*Nset, nset=AlongZ-In, instance=Tube-1
     3,    62,   167,   226,   331,   390
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*Elset, elset=AlongZ-In-El, instance=Tube-1, generate
    82,  19639,    123
*Nset, nset=AlongZ-O, instance=Tube-1
     5,    39,   169,   203,   333,   367
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*Elset, elset=AlongZ-O-El, instance=Tube-1, generate
    63,  19620,    123
*Nset, nset=Set-3, instance=Tube-1, generate
   1,  164,    1
*Elset, elset=Set-3, instance=Tube-1, generate
   1,  123,    1
*Nset, nset=Set-4, instance=Tube-1
     2,     3,     6,     7,    11,    12
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*Elset, elset=Set-4, instance=Tube-1
     3,     6,     9,    12,    15,    18
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*Nset, nset=Set-5, instance=Tube-1
     1,     4,     5,     8,    21,    22
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*Elset, elset=Set-5, instance=Tube-1
     1,     4,     7,    10,    13,    16
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*Nset, nset=Set-6, instance=Tube-1
 6,
*Nset, nset=TubeEnd, instance=Tube-1, generate
   1,  164,    1
*Elset, elset=TubeEnd, instance=Tube-1, generate
   1,  123,    1
*Nset, nset=TubeInlet, instance=Tube-1, generate
 26241,  26404,      1
*Elset, elset=TubeInlet, instance=Tube-1, generate
 19558,  19680,      1
*Elset, elset=_Ri_S4, internal, instance=Tube-1
     3,     6,     9,    12,    15,    18
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*Elset, elset=_Ri_S6, internal, instance=Tube-1
    28,    31,    34,    37,    40,    43
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*Surface, type=ELEMENT, name=Ri
_Ri_S4, S4
_Ri_S6, S6
*Nset, nset=_T-Cylindrical, internal
TubeEnd,
TubeInlet,
Set-4,
Set-5,
*Transform, nset=_T-Cylindrical, type=C
          0.,           0.,           0.,           0.,           0.,           1.
*Orientation, name=Cylindrical, system=CYLINDRICAL
          0.,           0.,           0.,           0.,           0.,           1.
1, 0.
*End Assembly
*Amplitude, name=Amp-1, definition=SMOOTH STEP
             0.,              0.,             0.2,             0.3,              1.,              1.
**
** MATERIALS
**
*Material, name=Material-1
*Elastic
 1e+06, 0.3
**
** BOUNDARY CONDITIONS
**
** Name: BC-1 Type: Displacement/Rotation
*Boundary
TubeEnd, 1, 1
TubeEnd, 2, 2
TubeEnd, 3, 3
** Name: BC-2 Type: Displacement/Rotation
*Boundary
TubeInlet, 2, 2

** ----------------------------------------------------------------
**
** STEP: Step-1
**
*Step, name=Step-1, nlgeom=YES, inc=10000, convert sdi=YES
*Static
10., 100., 1., 10.
**
*Adaptive Mesh Controls, name=Ada-1, geometric enhancement=YES
0.0, 1.0
*Adaptive Mesh, elset=Tube-1.Tube, controls=Ada-1, frequency=1, mesh sweeps=1, op=NEW
**
** ADAPTIVE MESH CONSTRAINTS
** Name: Ada-Cons-2 Type: Velocity/Angular velocity
*Adaptive Mesh Constraint, user, type=VELOCITY, op=new
Set-4,1,,1e-6
**
** BOUNDARY CONDITIONS
**
** Name: BC-1 Type: Displacement/Rotation
*Boundary, op=NEW
TubeEnd, 2, 2
** Name: BC-2 Type: Displacement/Rotation
*Boundary, op=NEW
TubeInlet, 2, 2
TubeInlet, 3, 3
** Name: BC-4 Type: Displacement/Rotation
*Boundary, op=NEW
Set-4, 2, 2
** Name: BC-5 Type: Displacement/Rotation
*Boundary, op=NEW
Set-5, 2, 2
**
** LOADS
**
** Name: Load-4   Type: Surface traction
*Dsload, orientation=Cylindrical
Ri, TRVECNU, 1., 1., 0., 0.
**
** OUTPUT REQUESTS
**
*Restart, write, frequency=0
**
** FIELD OUTPUT: F-Output-1
**
*Output, field
*Node Output
CF, COORD, RF, U
*Element Output, directions=YES
LE, PE, PEEQ, PEMAG, S
*Contact Output
CDISP, CSTRESS
**
** HISTORY OUTPUT: H-Output-1
**
*Output, history, variable=PRESELECT
*End Step
